# Задано:
R := 287*J/(kg*K)
# Газ - Смесь газов
Pn := 4 MPa
Tvs := 20 °C
# К оппозитный!!!!!
ρg := 1.2723  # до 1000 частота
Ve := 1250*L/min = 0.0208333 m^3/s
Pvs := 0.3 MPa
Tvs1 := Tvs = 293.15 K
ρvoz := 1.2928
ρg := 1.3097
z1 := 2
Pkar := Pvs
ΔT := 10 K
Tvs2 := Tvs1 + ΔT = 303.15 K
# Решение:
# 1. | 1.1 Определение общей степени повышения давления
Ve := Ve*1.1
ε := Pn/Pvs = 13.3333
# 1.2. Определение степени сжатия на каждой ступени
ε11 := nthroot(ε, z1) = 3.65148
ε1 := 1.05*ε11 = 3.83406
ε2 := ε/ε1 = 3.4776
# 1.3. Вычисление промежуточного давления
Pm := Pvs*ε1 = 1150217 Pa
# 1.4. По рекомендациям учебника задаются значения коэффициентов и приблизительной скорости
A := 2.66*Pa^0.25
δf := 0.005
Cm := 1.5*m/s
# 2. Определение относительных гидравлических потерь на всасывании и нагнетании
# 2.1. Первой ступени
δvs1 := δf + 0.3*(Cm/(3.55*m/s))^2*(ρg/ρvoz)*A/Pvs^0.25 = 0.0111672
δn1 := 0.7*(Cm/(3.55*m/s))^2*(ρg/ρvoz)*A/Pm^0.25 = 0.0102837
# 2.2. Второй ступени
δvs2 := 0.3*(Cm/(3.55*m/s))^2*(ρg/ρvoz)*A/Pm^0.25 = 0.00440732
δn2 := 0.7*(Cm/(3.55*m/s))^2*(ρg/ρvoz)*A/Pn^0.25 = 0.00753062
# 3. Определение давления на нагнетании и всасывании
# 3.1. Первой ступени
Pvs1 := Pvs*(1 - δvs1) = 296650 Pa
Pn1 := Pm*(1 + δn1) = 1162046 Pa
# 3.2. Второй ступени
Pvs2 := Pm*(1 - δvs2) = 1145148 Pa
Pn2 := Pn*(1 + δn2) = 4030122 Pa
# 4. Уточнение значения степеней сжатия по ступеням
ε1' := Pn1/Pvs1 = 3.91723
ε2' := Pn2/Pvs2 = 3.5193
# 5. Определение коэффициентов подачи
# 5.1. По рекомендациям учебника задается мертвый объем и коэффициент адиабаты
am := 0.03
k := 1.21
# 5.2. Определение показателя политропы обратного расширения
m1 := 1 + 0.5*(k - 1) = 1.105
m2 := 1 + 0.62*(k - 1) = 1.1302
m2 := 1.075
m1 := m2
# 1 ступень | 2 ступень
# 5.3. Определение λ0i (учитывает влияние мертвого объема)
λ01 := 1 - am*(ε1'^(1/m1) - 1) = 0.923161
λ02 := 1 - am*(ε2'^(1/m2) - 1) = 0.933294
_______________________________________________________________________________________
# 5.4. Определение λti (учитывает подогрев газа на всасывании)
λt1 := 1 - 0.01*(ε1' - 1) = 0.970828
λt2 := 1 - 0.01*(ε2' - 1) = 0.974807
________________________________________________________________________________________
# 5.5. Определение λdpi
# (уитывает потери при дросселировании)
λdr1 := 1 - δvs1 = 0.988833
λdr2 := 1 - δvs2 = 0.995593
________________________________________________________________________________________
# 5.7. Опредление коэффициентов подачи для ступеней
λ1 := λ01*λt1*λdr1 = 0.886222
λ2 := λ02*λt2*λdr2 = 0.905772
# 6. Определение описанного объема для ступеней
Vh1 := Ve/λ1 = 0.0258588 m^3/s
Vh2 := Ve*Pvs1*Tvs2/(λ2*Pvs2*Tvs1) = 0.00677771 m^3/s
# 7. Определение хода поршня
# 7.1. Задание частоты вращения электродвигателя
# 7.2. Определение диаметра поршней
n := 1450/60*s^-1
Sh1 := Cm/(2*n) = 0.0310345 m
D1 := sqrt(8*Vh1/(3.14*Cm)) = 0.209575 m
D2 := sqrt(8*Vh2/(3.14*Cm)) = 0.107294 m
# Принимаем значения D по ГОСТ:
D1gost := 0.21 m
D2gost := 0.130 m
# Вычисляем ход поршня для ступеней и выбираем оптимальные допустимые варианты
.
Sh1 := 0.6*D1gost = 0.126 m
Sh1' := 0.12 m
n := Cm/(2*Sh1') = 6.25 1/s
Sh2 := Vh2*4/(π*D2gost^2*n) = 0.0817008 m
Sh2' := 0.082 m
# 8. Проверка соответствия параметров стандартным диапазонам значений
n*60 = 375 1/s
# Ускорение
# (Стандарт 17..60 м/с^2)
# Относительная длина хода
# (Cандарт 0.45-0.7)
# 1 ступень
Sh1'*n^2 = 4.6875 m/s^2
ψ1 := Sh1'/D1gost = 0.571429
ψ2 := Sh2'/D2gost = 0.630769
# 2 ступень
Sh2'*n^2 = 3.20312 m/s^2
# 9. Уточнение скоростей поршней
Cm1 := 2*Sh1'*n = 1.5 m/s
Cm2 := 2*Sh2'*n = 1.025 m/s
# 10. Вычисление описанного объема с учетом новых скоростей поршней, определение погрешности относительно старых значений
# 1 ступень | 2 ступень
Vh1' := π*D1gost^2*Cm1/8 = 0.025977 m^3/s
Vh2' := π*D2gost^2*Cm2/8 = 0.00680253 m^3/s
Vh1 = 0.0258588 m^3/s
Vh2 = 0.00677771 m^3/s
δ := (Vh1' - Vh1)/Vh1'*100 = 0.455047
δ := (Vh2' - Vh2)/Vh2'*100 = 0.364909
# δ < 5% удовлетроряет диапазону погрешности => принимаем данные значения величин как истинные
# 11. Пересчитаем величины давлений и степеней сжатия по ступеням
Pm' := Pm*Vh1'/Vh1*Vh2/Vh2' = 1151259 Pa
Pn2 = 4030122 Pa
Pn1' := Pm'*(1 + δn1) = 1163098 Pa
Pvs2' := Pm'*(1 - δvs2) = 1146185 Pa
ε1'' := Pn1'/Pvs1 = 3.92078
ε2'' := Pn2/Pvs2' = 3.51612
# 12. Определение коэффициентов возврата мощности
Θ1 := 1 - am*(ε1''^(1/k) - 1) = 0.937208
Θ2 := 1 - am*(ε2''^(1/k) - 1) = 0.945197
# 13. Определение индикаторной мощности по ступеням
Pvs1 = 296650 Pa
Ni1 := Pvs1*Vh1'*Θ1*k/(k - 1)*(ε1''^((k - 1)/k) - 1) = 11135.8 W
Vh1' = 0.025977 m^3/s
Pvs2' = 1146185 Pa
Ni2 := Pvs2'*Vh2'*Θ2*k/(k - 1)*(ε2''^((k - 1)/k) - 1) = 10355.1 W
# 14. Сравнение индикаторных мощностей ступеней
Vh2' = 0.00680253 m^3/s
δ := (Ni1 - Ni2)/Ni1*100 = 7.01079  # <20% => удовлетворяет требованиям задания
# 15. Определение общей индикаторной мощности
Ni := Ni1 + Ni2 = 21490.9 W
# 16. Определение марки необходимого для обеспечения ресурса электродвигателя
Ptr := 50*10^3*Pa
# Зададим механический  КПД
Ntr1 := Ptr*Vh1' = 1298.85 W
ηmeh := 0.85
Ntr2 := Ptr*Vh2' = 340.126 W
# Определим необходимую мощность электродвигателя
ηmeh := (Ni1 + Ni2)/(Ni1 + Ni2 + Ntr1 + Ntr2) = 0.92914
Ne := Ni/ηmeh = 23129.8 W
Nэд := 1.15*Ne = 26599.3 W
# По заданной частоте и полученной мощности подбираем электродвигатель. Ближайший по мощности - А200М4 с номинальной мощностью 37 кВт
# 17.  Определение изотермической и адиабатной мощностей
Nиз := Pvs1*Vh1'*λ1*(ln(ε1'') + ln(ε2'')) = 17917.7 W
Ns := k/(k - 1)*Pvs1*Vh1'*λ1*(ε1''^((k - 1)/k) + Tvs2/Tvs1*ε2''^((k - 1)/k) - 2) = 21795.4 W
# 18. Определение изотермического и адиабатного КПД
ηиз := Nиз/Ne = 0.774657
ηs := Ns/Ne = 0.942309
# 19. Определение поршневых сил давления в мертвых точках
# годограф сил на шатунную шейку
n = 6.25 1/s
n*60 = 375 1/s
# Силы, действ на поршень
D1gost = 0.21 m
D2gost = 0.13 m
# тангенциальные на кривошип
Pn1' = 1163098 Pa
# Уравновешивание компрессора
Pn2 = 4030122 Pa
Pvs1 = 296650 Pa
Pvs2' = 1146185 Pa
Cm1 = 1.5 m/s
Sh1' = 0.12 m
Sh2' = 0.082 m
Vh1' = 0.025977 m^3/s
Vh2' = 0.00680253 m^3/s
Cm2 = 1.025 m/s
Ntr1 = 1298.85 W
Ntr2 = 340.126 W
# Для построения графиков
ΔVmo1 := Vh1'*(1 - λ01) = 0.00199605 m^3/s
ΔVmo2 := Vh2'*(1 - λ02) = 0.000453769 m^3/s
Vmo1 := Vh1'*am = 0.000779311 m^3/s
Vmo2 := Vh2'*am = 0.000204076 m^3/s
ΔS1 := R*ln(Pvs/Pvs1) = 3.22302 m^2/(K*s^2)
ΔS2 := R*ln(Pn1'/Pm') = 2.93636 m^2/(K*s^2)
ΔS3 := R*ln(Pm'/Pvs2') = 1.2677 m^2/(K*s^2)
ΔS4 := R*ln(Pn2/Pn) = 2.15319 m^2/(K*s^2)
# Построение графика P-V
# Точка 4
V4 := 60*(Vmo1 + ΔVmo1) = 0.166522 m^3/s
P1 := Pvs1 = 296650 Pa
# Точка 1
V1 := 60*(Vmo1 + Vh1') = 1.60538 m^3/s
P4 := P1 = 296650 Pa
# Точка 2
V2 := V1*(Pvs1/Pn1')^(1/k) = 0.519025 m^3/s
P2 := Pn1' = 1163098 Pa
# Точка 3
P3 := Pn1' = 1163098 Pa
V3 := 60*Vmo1 = 0.0467587 m^3/s
# Точка 4`
V4' := 60*(Vmo2 + ΔVmo2) = 0.0394707 m^3/s
P1' := Pvs2' = 1146185 Pa
# Точка 1`
V1' := 60*(Vmo2 + Vh2') = 0.420396 m^3/s
P4' := P1' = 1146185 Pa
# Точка 2`
V2' := V1'*(Pvs2'/Pn2)^(1/k) = 0.148719 m^3/s
P2' := Pn2 = 4030122 Pa
# Точка 3`
P3' := Pn2 = 4030122 Pa
V3' := 60*Vmo2 = 0.0122446 m^3/s
# Операции для построения графика
z := 0, 0.1 .. 1.5
P1vs(z) := Pvs
P1vs'(z) := Pvs1
P1n'(z) := Pn1'
P2vs'(z) := Pvs2'
P1m'(z) := Pm'
P2n(z) := Pn
P2n'(z) := Pn2
x := Pvs1, Pvs1 + 1000*Pa .. Pn1'
x1 := Pvs2', Pm' .. Pn2
Ad12(x) := V1*(Pvs1/x)^(1/k)
Ad12'(x1) := V1'*(Pvs2'/x1)^(1/k)
Ad34(x) := V3*(Pn1'/x)^(1/m1)
Ad34'(x1) := V3'*(Pn2/x1)^(1/m1)
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P - V
# Постороение графика T - S
Tvs = 293.15 K
Tvs2 = 303.15 K
# Точка 0
T0 := Tvs = 293.15 K
S0 := 3867.15*J/(K*kg)
# Точка 1
T1 := T0
S1 := S0 + ΔS1 = 3870.37 m^2/(K*s^2)
# Точка 2
S2 := S1
T2 := T1*(Pn1'/Pvs1)^((k - 1)/k) = 371.597 K
# Точка 3
T3 := T2 = 371.597 K
S3 := S2 + ΔS2 = 3873.31 m^2/(K*s^2)
# Точка 4
Cp := 1000*J/(K*kg)
S4 := Cp*ln(Tvs2/T3) + S3 = 3669.73 m^2/(K*s^2)
T4 := Tvs2 = 303.15 K
# Точка 1`
T1' := Tvs2 = 303.15 K
S1' := S4 + ΔS3 = 3671 m^2/(K*s^2)
# Точка 2`
S2' := S1' = 3671 m^2/(K*s^2)
T2' := Tvs2*(Pn2/Pvs2')^((k - 1)/k) = 377.076 K
# Точка 3`
T3' := T2' = 377.076 K
S3' := S2' + ΔS4 = 3673.15 m^2/(K*s^2)
# Точка 4`
S4' := S3' + Cp*ln((Tvs2 + ΔT)/T3') = 3487.38 m^2/(K*s^2)
T4' := Tvs2 + ΔT = 313.15 K
# Операции для построения графика
Tvs1 = 293.15 K
x := Tvs1, 294.15 K .. 430.15 K
IsoPvs(x) := Cp*ln(x/Tvs1) + S0
IsoPvs1(x) := Cp*ln(x/Tvs1) + S1
x1 := Tvs1, 294.15 K .. 430.15 K
x2 := Tvs1, 294.15 K .. 430.15 K
IsoPn1(x) := Cp*ln(x/T2) + S2
IsoPn2(x) := Cp*ln(x/T2') + S2'
IsoPm(x) := Cp*ln(x/T2) + S3
IsoPn(x) := Cp*ln(x/T2') + S3'
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